// COMSOL Multiphysics 5.6.0.401 model "euler_beam_2D.mph"
// Outline of the model tree

Common definitions
  mpf1: ParticipationFactors

Geometry
  geom1 "Geometry 1" (2D, length unit m)
    ls1: LineSegment | specify1 = coord; specify2 = coord; coord2 = {0.4, 0}
    fin: Finalize "Form Union"

Physics
  beam: HermitianBeam on all boundaries
    dependent variable u = {u, v, w}
    emm1: Elastic "Linear Elastic Material 1" (default)
      E_mat = userdef
      E = 200e9
      nu_mat = userdef
      nu = 0.3
      rho_mat = userdef
      rho = 7850
    csd1: CrossSectionBeam "Cross-Section Data 1" (default) | area = 0.196349540849[m^2]; Izz = 0.00306796157577[m^4]
    free1: Free (default)
    init1: init "Initial Values 1" (default)

Mesh
  mesh1 "Mesh 1"
    size: MeshSizeDefault | hmax = 0.5; hmin = 0.35; hauto = 9; custom = on
    edg1: Edge on boundaries 1 | smoothmaxiter = 4; smoothmaxdepth = 4

Studies
  std1 "Study 1"
    eig: Eigenfrequency | shift = 1[Hz]; conrad = 1

Solver configurations
  sol1 "Solution 1" (study std1)
    v1: Variables "Dependent Variables 1"
    e1: Eigenvalue "Eigenvalue Solver 1" | eigvfunscale = maximum; eigvfunscaleparam = 4.0E-7
      dDef: Direct

Datasets
  dset1: Solution | solution = sol1